*NODE, NSET=ALL
11, 2, 0, 0.0
12, 0, 1, 0.0
13, 1, 2, 0.0
14, 2, 0, 0.0
15, 0, 1, 0.0
16, 1, 2, 0.0
17, 2, 0, 0.0
18, 0, 1, 0.0
19, 1, 2, 0.0
20, 2, 0, 0.0
21, 0, 1, 0.0
22, 1, 2, 0.0
23, 2, 0, 0.0
*ELEMENT, TYPE=C3D8, ELSET=EALL
1, 11, 12, 13, 21, 22, 23, 12, 13
*STEP
*STATIC
*EQUATION
2
11, 1, 1.0, 21, 1, -1.0
*EQUATION
2
12, 2, 1.0, 22, 2, -1.0
*EQUATION
2
13, 3, 2.0, 23, 3, -2.0
*NODE FILE
U
*END STEP
